/* -------------------------------------------------------------------- */
/* Copyright (C) 1991 - 2017 - EDF R&D - www.code-aster.org             */
/* This file is part of code_aster.                                     */
/*                                                                      */
/* code_aster is free software: you can redistribute it and/or modify   */
/* it under the terms of the GNU General Public License as published by */
/* the Free Software Foundation, either version 3 of the License, or    */
/* (at your option) any later version.                                  */
/*                                                                      */
/* code_aster is distributed in the hope that it will be useful,        */
/* but WITHOUT ANY WARRANTY; without even the implied warranty of       */
/* MERCHANTABILITY or FITNESS FOR A PARTICULAR PURPOSE.  See the        */
/* GNU General Public License for more details.                         */
/*                                                                      */
/* You should have received a copy of the GNU General Public License    */
/* along with code_aster.  If not, see <http://www.gnu.org/licenses/>.  */
/* -------------------------------------------------------------------- */

@Parser Implicit;
@Behaviour BETON_BURGER;
@Author François Hamon( EDF R &D ERMES - T65 );
@Description {
BETON_BURGER model for concrete creep;
}

@Algorithm NewtonRaphson_NumericalJacobian;
@Theta 1.;
@Epsilon 1.E-11;

@Includes {
#include "TFEL/Material/Lame.hxx"
}

@MaterialProperty stress young;
young.setGlossaryName( "YoungModulus" );
@MaterialProperty real nu;
nu.setGlossaryName( "PoissonRatio" );

@MaterialProperty real K_RS;
@MaterialProperty real ETA_RS;
@MaterialProperty real KAPPA;
@MaterialProperty real ETA_IS;
@MaterialProperty real K_RD;
@MaterialProperty real ETA_RD;
@MaterialProperty real ETA_ID;
@MaterialProperty real QSR_K;
@MaterialProperty real TEMP_0_C;
@MaterialProperty real ETA_FD;

@StateVariable real ESPHR;
@StateVariable real ESPHI;
@StateVariable real ELIM;
@StateVariable Stensor EDEVR;
@StateVariable Stensor EDEVI;
@StateVariable Stensor Edess;

@ExternalStateVariable real C;
@ExternalStateVariable real H;
@ExternalStateVariable real xi;


C.setEntryName("ConcreteDrying");
H.setEntryName("Hygrometry");
xi.setEntryName("ConcreteHydration");


@AuxiliaryStateVariable Stensor EF;

@LocalVariable real lambda;
@LocalVariable real mu;
@LocalVariable real val;

/* Initialize Lame coefficients */
@InitLocalVariables {
    using namespace tfel::material::lame;
    lambda = computeLambda( young, nu );
    mu = computeMu( young, nu );
}

@TangentOperator {
    using namespace tfel::material::lame;
    if ( ( smt == ELASTIC ) || ( smt == SECANTOPERATOR ) ) {
        computeAlteredElasticStiffness< hypothesis, Type >::exe( Dt, lambda, mu );
    } else if ( smt == CONSISTENTTANGENTOPERATOR ) {
        StiffnessTensor Hooke;
        Stensor4 Je;
        computeElasticStiffness< N, Type >::exe( Hooke, lambda, mu );
        getPartialJacobianInvert( Je );
        Dt = Hooke * Je;
    } else {
        return false;
    }
}

@ComputeStress {
    sig = lambda * trace( eel ) * Stensor::Id() + 2 * mu * eel;
}

@Integrator {
    real stresP = trace( sig ) / 3.;
    Stensor stresD = sig - stresP * Stensor::Id();
    real Tmoy = ( 2. * T + dT ) / 2.;
    real Vsech = fabs( dH);
    real KRS_T = K_RS * exp( QSR_K * ( 1. / ( 273. + Tmoy ) - 1. / ( 273 + TEMP_0_C ) ) );
    real KRD_T = K_RD * exp( QSR_K * ( 1. / ( 273. + Tmoy ) - 1. / ( 273 + TEMP_0_C ) ) );
    real NRS_T = ETA_RS * exp( QSR_K * ( 1. / ( 273. + Tmoy ) - 1. / ( 273 + TEMP_0_C ) ) );
    real NRD_T = ETA_RD * exp( QSR_K * ( 1. / ( 273. + Tmoy ) - 1. / ( 273 + TEMP_0_C ) ) );
    real NIS_T = ETA_IS * exp( QSR_K * ( 1. / ( 273. + Tmoy ) - 1. / ( 273 + TEMP_0_C ) ) );
    real NID_T = ETA_ID * exp( QSR_K * ( 1. / ( 273. + Tmoy ) - 1. / ( 273 + TEMP_0_C ) ) );
    real KAPPA_T = KAPPA / exp( QSR_K * ( 1. / ( 273. + Tmoy ) - 1. / ( 273 + TEMP_0_C ) ) );

    real emax = sqrt( ( ( ESPHI + dESPHI ) * Stensor::Id() + ( EDEVI + dEDEVI ) ) |
                      ( ( ESPHI + dESPHI ) * Stensor::Id() + ( EDEVI + dEDEVI ) ) );
    fELIM = ELIM + dELIM - max( ELIM, emax );

    val = ( ELIM + dELIM ) / KAPPA_T;
    if ( val < -200 ) {
        val = -200;
    } else if ( val > 200 ) {
        val = 200;
    }

    real eexp = exp( val );
    fESPHR = dESPHR - ( ( H * stresP - KRS_T * ( ESPHR + dESPHR ) ) / NRS_T ) * dt;
    fEDEVR = dEDEVR - ( H * stresD - KRD_T * ( EDEVR + dEDEVR ) ) / NRD_T * dt;
    fESPHI = dESPHI - ( H * stresP / ( NIS_T * eexp ) ) * dt;
    fEDEVI = dEDEVI - ( H * stresD / ( NID_T * eexp ) ) * dt;
    if ( ETA_FD > 0. ) {
        fEdess = dEdess - ( 1. / ETA_FD ) * Vsech * sig;
    } else {
        fEdess = dEdess - 0. * Vsech * sig;
    }

    feel = deel - ( deto - dEDEVR - dEDEVI - dEdess - ( dESPHR + dESPHI ) * Stensor::Id() );
}
@UpdateAuxiliaryStateVariables {

    EF = EF + dEDEVR + dEDEVI + ( dESPHR + dESPHI ) * Stensor::Id();
}
